*Heading
** Job name: Job-1 Model name: Model-1
** Generated by: Abaqus/CAE 2020
*Preprint, echo=NO, model=NO, history=NO, contact=NO
**
** PARTS
**
*Part, name=Part-1
*End Part
**
**
** ASSEMBLY
**
*Assembly, name=Assembly
**
*Instance, name=Part-1-1, part=Part-1
*Node
      1,         -2.5,          2.5,  -1.44337559
      2,           0.,          2.5,  -3.22168779
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*Element, type=C3D8R
 1,  709,  710, 2074, 2073,   45,   46,  698,  697
 2,  710,   50,  701, 2074,   46,    1,   47,  698
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*Nset, nset=Set-1
   15,   16,   17,   18,   19,   20
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*Elset, elset=Set-1, generate
  52,  476,    1
*Nset, nset=Set-2
    1,    2,    3,    4,    5,    6
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*Elset, elset=Set-2
    1,    2,    3,    4,    5,    6
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** Section: Section-1
*Solid Section, elset=Set-2, material=Material-1
,
** Section: Section-1
*Solid Section, elset=Set-1, material=Material-1
,
*End Instance
**
*Nset, nset=Set-1, instance=Part-1-1
   15,   16,   17,   18,   19,   20
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*Elset, elset=Set-1, instance=Part-1-1, generate
  52,  476,    1
*Nset, nset=Set-7, instance=Part-1-1
   3,   4,   9,  10,  11,  12
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*Elset, elset=Set-7, instance=Part-1-1
  7,  8,  9, 38, 39, 40
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*Nset, nset=Set-8, instance=Part-1-1
   3,   4,   9,  10,  11,  12
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*Elset, elset=Set-8, instance=Part-1-1
  7,  8,  9, 38, 39, 40
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*Nset, nset=Set-9, instance=Part-1-1
    1,    2,    3,    4,    5,    6
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*Elset, elset=Set-9, instance=Part-1-1, generate
  1,  51,   1
*End Assembly
**
** MATERIALS
**
*Material, name=Material-1
*Elastic
 2e+08, 0.29
** ----------------------------------------------------------------
**
** STEP: Step-1
**
*Step, name=Step-1, nlgeom=NO
*Static
1., 1., 1e-05, 1.
**
** BOUNDARY CONDITIONS
**
** Name: BC-1 Type: Displacement/Rotation
*Boundary
Set-9, 1, 1
Set-9, 2, 2
Set-9, 3, 3
Set-9, 4, 4
Set-9, 5, 5
Set-9, 6, 6
**
** LOADS
**
** Name: Load-1   Type: Body force
*Dload
Set-1, BZ, -125.
**
** OUTPUT REQUESTS
**
*Restart, write, frequency=0
**
** FIELD OUTPUT: F-Output-1
**
*Output, field, variable=PRESELECT
**
** HISTORY OUTPUT: H-Output-1
**
*Output, history, variable=PRESELECT
*End Step
